# 1 - система формирования комплектов
A1 := [1, 2, 3, 4; 1/2, 1, 5, 3; 1/3, 1/5, 1, 1/3; 1/4, 1/3, 3, 1]
A2 := [1, 2, 3, 4; 1/2, 1, 6, 3; 1/3, 1/6, 1, 1/4; 1/4, 1/3, 4, 1]
A3 := [1, 5, 9, 7; 1/5, 1, 3, 1/5; 1/9, 1/3, 1, 1/5; 1/7, 5, 5, 1]  # 2 - система формирования групп партий и комплектов
# 3 - директивные сроки выпуска комплекта
A := [
    1, 1/3, 1/5, 1/7, 1/9, 1/7;
    3, 1, 1/3, 1/5, 1/9, 1/7;
    5, 3, 1, 1/3, 1/7, 1/3;
    7, 5, 3, 1, 1/5, 1/3;
    9, 9, 7, 5, 1, 3;
    7, 7, 3, 3, 1/3, 1
]  # 4 - динамическое расписание
A4 := [1, 3, 5, 5; 1/3, 1, 3, 3; 1/5, 1/3, 1, 1/3; 1/5, 1/3, 3, 1]
A5 := [1, 5, 9, 7; 1/5, 1, 3, 1/5; 1/9, 1/3, 1, 1/5; 1/7, 5, 5, 1]
A6 := [1, 7, 9, 1/3; 1/7, 1, 3, 1/3; 1/9, 1/3, 1, 1/5; 3, 3, 5, 1]
A := transpose(A)
W := [1/(A[0, 0] + A[0, 1] + A[0, 2] + A[0, 3] + A[0, 4] + A[0, 5]), 1/(A[1, 0] + A[1, 1] + A[1, 2] + A[1, 3] + A[1, 4] + A[1, 5]), 1/(A[2, 0] + A[2, 1] + A[2, 2] + A[2, 3] + A[2, 4] + A[2, 5]), 1/(A[3, 0] + A[3, 1] + A[3, 2] + A[3, 3] + A[3, 4] + A[3, 5]), 1/(A[4, 0] + A[4, 1] + A[4, 2] + A[4, 3] + A[4, 4] + A[4, 5]), 1/(A[5, 0] + A[5, 1] + A[5, 2] + A[5, 3] + A[5, 4] + A[5, 5])]
W = [0.03125, 0.0394737, 0.0688073, 0.103346, 0.526756, 0.201923]
sum := W[0, 0] + W[0, 1] + W[0, 2] + W[0, 3] + W[0, 4] + W[0, 5] = 0.971556
W := W/sum = [0.0321649, 0.0406293, 0.0708218, 0.106372, 0.542177, 0.207835]
A = [
    1, 3, 5, 7, 9, 7;
    0.333333, 1, 3, 5, 9, 7;
    0.2, 0.333333, 1, 3, 7, 3;
    0.142857, 0.2, 0.333333, 1, 5, 3;
    0.111111, 0.111111, 0.142857, 0.2, 1, 0.333333;
    0.142857, 0.142857, 0.333333, 0.333333, 3, 1
]
q1 := [1/(A1[0, 0] + A1[0, 1] + A1[0, 2] + A1[0, 3]), 1/(A1[1, 0] + A1[1, 1] + A1[1, 2] + A1[1, 3]), 1/(A1[2, 0] + A1[2, 1] + A1[2, 2] + A1[2, 3]), 1/(A1[3, 0] + A1[3, 1] + A1[3, 2] + A1[3, 3])]
q2 := [1/(A2[0, 0] + A2[0, 1] + A2[0, 2] + A2[0, 3]), 1/(A2[1, 0] + A2[1, 1] + A2[1, 2] + A2[1, 3]), 1/(A2[2, 0] + A2[2, 1] + A2[2, 2] + A2[2, 3]), 1/(A2[3, 0] + A2[3, 1] + A2[3, 2] + A2[3, 3])]
q3 := [1/(A3[0, 0] + A3[0, 1] + A3[0, 2] + A3[0, 3]), 1/(A3[1, 0] + A3[1, 1] + A3[1, 2] + A3[1, 3]), 1/(A3[2, 0] + A3[2, 1] + A3[2, 2] + A3[2, 3]), 1/(A3[3, 0] + A3[3, 1] + A3[3, 2] + A3[3, 3])]
q4 := [1/(A4[0, 0] + A4[0, 1] + A4[0, 2] + A4[0, 3]), 1/(A4[1, 0] + A4[1, 1] + A4[1, 2] + A4[1, 3]), 1/(A4[2, 0] + A4[2, 1] + A4[2, 2] + A4[2, 3]), 1/(A4[3, 0] + A4[3, 1] + A4[3, 2] + A4[3, 3])]
q5 := [1/(A5[0, 0] + A5[0, 1] + A5[0, 2] + A5[0, 3]), 1/(A5[1, 0] + A5[1, 1] + A5[1, 2] + A5[1, 3]), 1/(A5[2, 0] + A5[2, 1] + A5[2, 2] + A5[2, 3]), 1/(A5[3, 0] + A5[3, 1] + A5[3, 2] + A5[3, 3])]
q6 := [1/(A6[0, 0] + A6[0, 1] + A6[0, 2] + A6[0, 3]), 1/(A6[1, 0] + A6[1, 1] + A6[1, 2] + A6[1, 3]), 1/(A6[2, 0] + A6[2, 1] + A6[2, 2] + A6[2, 3]), 1/(A6[3, 0] + A6[3, 1] + A6[3, 2] + A6[3, 3])]
q1 = [0.1, 0.105263, 0.535714, 0.218182]
q2 = [0.1, 0.0952381, 0.571429, 0.179104]
v1 := [q1[0, 0]; q2[0, 0]; q3[0, 0]; q4[0, 0]; q5[0, 0]; q6[0, 0]]
v2 := [q1[0, 1]; q2[0, 1]; q3[0, 1]; q4[0, 1]; q5[0, 1]; q6[0, 1]]
v3 := [q1[0, 2]; q2[0, 2]; q3[0, 2]; q4[0, 2]; q5[0, 2]; q6[0, 2]]
v4 := [q1[0, 3]; q2[0, 3]; q3[0, 3]; q4[0, 3]; q5[0, 3]; q6[0, 3]]
q3 = [0.0454545, 0.227273, 0.608108, 0.0897436]
q4 = [0.0714286, 0.136364, 0.535714, 0.220588]
q5 = [0.0454545, 0.227273, 0.608108, 0.0897436]
q6 = [0.0576923, 0.223404, 0.608108, 0.0833333]
D := [min(v1), min(v2), min(v3), min(v4)]
D = [0.0454545, 0.0952381, 0.535714, 0.0833333]
Q1 := [q1[0, 0]^W[0, 0], q1[0, 1]^W[0, 0], q1[0, 2]^W[0, 0], q1[0, 3]^W[0, 0]]
Q2 := [q2[0, 0]^W[0, 1], q2[0, 1]^W[0, 1], q2[0, 2]^W[0, 1], q2[0, 3]^W[0, 1]]
Q3 := [q3[0, 0]^W[0, 2], q3[0, 1]^W[0, 2], q3[0, 2]^W[0, 2], q3[0, 3]^W[0, 2]]
Q4 := [q4[0, 0]^W[0, 3], q4[0, 1]^W[0, 3], q4[0, 2]^W[0, 3], q4[0, 3]^W[0, 3]]
Q5 := [q5[0, 0]^W[0, 4], q5[0, 1]^W[0, 4], q5[0, 2]^W[0, 4], q5[0, 3]^W[0, 4]]
Q6 := [q6[0, 0]^W[0, 5], q6[0, 1]^W[0, 5], q6[0, 2]^W[0, 5], q6[0, 3]^W[0, 5]]
Q1 = [0.928614, 0.930147, 0.980124, 0.952211]
Q2 = [0.91069, 0.908887, 0.97752, 0.932512]
Q3 = [0.803392, 0.900388, 0.965386, 0.843043]
Q4 = [0.755238, 0.809014, 0.935763, 0.851482]
v1 := [Q1[0, 0]; Q2[0, 0]; Q3[0, 0]; Q4[0, 0]; Q5[0, 0]; Q6[0, 0]]
v2 := [Q1[0, 1]; Q2[0, 1]; Q3[0, 1]; Q4[0, 1]; Q5[0, 1]; Q6[0, 1]]
v3 := [Q1[0, 2]; Q2[0, 2]; Q3[0, 2]; Q4[0, 2]; Q5[0, 2]; Q6[0, 2]]
v4 := [Q1[0, 3]; Q2[0, 3]; Q3[0, 3]; Q4[0, 3]; Q5[0, 3]; Q6[0, 3]]
Q5 = [0.187141, 0.447852, 0.763624, 0.270609]
Q6 = [0.552736, 0.73235, 0.901786, 0.596635]
D := [min(v1), min(v2), min(v3), min(v4)]
D = [0.187141, 0.447852, 0.763624, 0.270609]
