l[0, 1] := 1
l[1, 2] := 1
l[2, 3] := 1
l[3, 4] := 1.5
l[3, 5] := 0.5
l[4, 3] := 0.8
p := [1; 0; 0; 0; 0; 0; 0; 0; 0]
l[5, 6] := 1
l[5, 7] := 2
l[6, 8] := 1.5
l[7, 8] := 1
l[8, 0] := 0.5
l = [
    0, 1, 0, 0, 0, 0, 0, 0, 0;
    0, 0, 1, 0, 0, 0, 0, 0, 0;
    0, 0, 0, 1, 0, 0, 0, 0, 0;
    0, 0, 0, 0, 1.5, 0.5, 0, 0, 0;
    0, 0, 0, 0.8, 0, 0, 0, 0, 0;
    0, 0, 0, 0, 0, 0, 1, 2, 0;
    0, 0, 0, 0, 0, 0, 0, 0, 1.5;
    0, 0, 0, 0, 0, 0, 0, 0, 1;
    0.5, 0, 0, 0, 0, 0, 0, 0, 0
]
A := [
    -l[0, 1], 0, 0, 0, 0, 0, 0, 0, l[8, 0];
    l[0, 1], -l[1, 2], 0, 0, 0, 0, 0, 0, 0;
    0, l[1, 2], -l[2, 3], 0, 0, 0, 0, 0, 0;
    0, 0, l[2, 3], -l[3, 4] - l[3, 5], l[4, 3], 0, 0, 0, 0;
    0, 0, 0, l[3, 4], -l[4, 3], 0, 0, 0, 0;
    0, 0, 0, l[3, 5], 0, -l[5, 6] - l[5, 7], 0, 0, 0;
    0, 0, 0, 0, 0, l[5, 6], -l[6, 8], 0, 0;
    0, 0, 0, 0, 0, l[5, 7], 0, -l[7, 8], 0;
    0, 0, 0, 0, 0, 0, l[6, 8], l[7, 8], -l[8, 0]
]
D(t, p) := [
    l[8, 0]*p[8] - l[0, 1]*p[0];
    l[0, 1]*p[0] - l[1, 2]*p[1];
    l[1, 2]*p[1] - l[2, 3]*p[2];
    l[4, 3]*p[4] + l[2, 3]*p[2] - l[3, 4]*p[3] - l[3, 5]*p[3];
    l[3, 4]*p[3] - l[4, 3]*p[4];
    l[3, 5]*p[3] - l[5, 6]*p[5] - l[5, 7]*p[5];
    l[5, 6]*p[5] - l[6, 8]*p[6];
    l[5, 7]*p[5] - l[7, 8]*p[7];
    l[6, 8]*p[6] + l[7, 8]*p[7] - l[8, 0]*p[8]
]
eigenvals(A) = [-2.90484; -2.81428; -3.85571e-16; -0.51405 + 0.505355i; -0.51405 - 0.505355i; -1.4809 + 0.515206i; -1.4809 - 0.515206i; -1.29314; -0.797842]
A = [
    -1, 0, 0, 0, 0, 0, 0, 0, 0.5;
    1, -1, 0, 0, 0, 0, 0, 0, 0;
    0, 1, -1, 0, 0, 0, 0, 0, 0;
    0, 0, 1, -2, 0.8, 0, 0, 0, 0;
    0, 0, 0, 1.5, -0.8, 0, 0, 0, 0;
    0, 0, 0, 0.5, 0, -3, 0, 0, 0;
    0, 0, 0, 0, 0, 1, -1.5, 0, 0;
    0, 0, 0, 0, 0, 2, 0, -1, 0;
    0, 0, 0, 0, 0, 0, 1.5, 1, -0.5
]
A2 := [
    1, 1, 1, 1, 1, 1, 1, 1, 1;
    l[0, 1], -l[1, 2], 0, 0, 0, 0, 0, 0, 0;
    0, l[1, 2], -l[2, 3], 0, 0, 0, 0, 0, 0;
    0, 0, l[2, 3], -l[3, 4] - l[3, 5], l[4, 3], 0, 0, 0, 0;
    0, 0, 0, l[3, 4], -l[4, 3], 0, 0, 0, 0;
    0, 0, 0, l[3, 5], 0, -l[5, 6] - l[5, 7], 0, 0, 0;
    0, 0, 0, 0, 0, l[5, 6], -l[6, 8], 0, 0;
    0, 0, 0, 0, 0, l[5, 7], 0, -l[7, 8], 0;
    0, 0, 0, 0, 0, 0, l[6, 8], l[7, 8], -l[8, 0]
]
lsolve(A2, p) = [0.0835267; 0.0835267; 0.0835267; 0.167053; 0.313225; 0.0278422; 0.0185615; 0.0556845; 0.167053]
t := 15
h := 20
Z := rkfixed(p, 0, t, h, D)
n := 1 .. h
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Z = [
    0, 1, 0, 0, 0, 0, 0, 0, 0, 0;
    0.75, 0.474121, 0.345703, 0.149414, 0.00439453, 0.0197754, 0.0065918, 0, 0, 0;
    1.5, 0.224784, 0.327962, 0.261191, 0.0922293, 0.0656335, 0.0187111, -7.73925e-5, 0.00202312, 0.00754299;
    2.25, 0.109237, 0.234266, 0.270904, 0.159985, 0.151691, 0.0283571, 0.00641191, 0.0178543, 0.0212933;
    3, 0.0601042, 0.151508, 0.226188, 0.194137, 0.23796, 0.0335559, 0.0136437, 0.0366819, 0.0462216;
    3.75, 0.0448216, 0.0977412, 0.169533, 0.20395, 0.30119, 0.035146, 0.0186286, 0.051281, 0.0777082;
    4.5, 0.0461386, 0.0697872, 0.122327, 0.200577, 0.337052, 0.034572, 0.0210634, 0.0598075, 0.108675;
    5.25, 0.0542995, 0.0596114, 0.090933, 0.192039, 0.35092, 0.0330424, 0.0216765, 0.06326, 0.134218;
    6, 0.0638791, 0.0596851, 0.0740875, 0.182982, 0.350794, 0.031342, 0.0213011, 0.0634536, 0.152475;
    6.75, 0.0721969, 0.0644642, 0.0677758, 0.175571, 0.343724, 0.0298823, 0.0205536, 0.0620239, 0.163808;
    7.5, 0.0782834, 0.0704599, 0.0677983, 0.17043, 0.334616, 0.0288137, 0.019795, 0.0601053, 0.169698;
    8.25, 0.0821334, 0.0758245, 0.0708422, 0.167375, 0.326266, 0.0281326, 0.0191905, 0.0583371, 0.171899;
    9, 0.0841868, 0.0798316, 0.0747241, 0.165896, 0.319872, 0.027763, 0.018782, 0.0569902, 0.171954;
    9.75, 0.0850026, 0.0824155, 0.0782444, 0.165443, 0.315626, 0.0276095, 0.0185475, 0.0561066, 0.171004;
    10.5, 0.0850849, 0.0838287, 0.0809091, 0.165554, 0.313204, 0.0275855, 0.0184412, 0.0556136, 0.169779;
    11.25, 0.0848121, 0.0844203, 0.0826541, 0.165904, 0.312099, 0.0276259, 0.0184157, 0.0553996, 0.16867;
    12, 0.0844297, 0.0845149, 0.0836302, 0.166295, 0.311818, 0.0276878, 0.0184328, 0.0553574, 0.167835;
    12.75, 0.0840729, 0.0843613, 0.0840583, 0.166627, 0.311971, 0.0277472, 0.0184663, 0.0554029, 0.167293;
    13.5, 0.0837991, 0.0841238, 0.084149, 0.166865, 0.312293, 0.0277937, 0.0185007, 0.0554801, 0.166995;
    14.25, 0.0836183, 0.0838949, 0.0840662, 0.167013, 0.312629, 0.0278248, 0.0185287, 0.0555564, 0.166869;
    15, 0.0835164, 0.0837156, 0.0839201, 0.167089, 0.312903, 0.0278427, 0.0185482, 0.0556172, 0.166847
]
