integral((1 + (-1/(a - b))^2)^(3/2), t) → t*(1/(a - b)^2 + 1)^(3/2)
M := [1, a*(1/(a - b)^2 + 1)^(3/2); 1, b*(1/(a - b)^2 + 1)^(3/2)]  # error: This variable is undefined.
s := [0; 1]
lsolve(M, s) → [
    a*(1/(a - b)^2 + 1)^(3/2)/(a*((a^2 - 2*a*b + b^2 + 1)/(a^2 - 2*a*b + b^2))^(3/2) - b*((a^2 - 2*a*b + b^2 + 1)/(a^2 - 2*a*b + b^2))^(3/2));
    -1/(a*((a^2 - 2*a*b + b^2 + 1)/(a^2 - 2*a*b + b^2))^(3/2) - b*((a^2 - 2*a*b + b^2 + 1)/(a^2 - 2*a*b + b^2))^(3/2))
]
